# OpenSim document version 30000
RRATool normalP032:
  model_file: ../skeletal_models/normalP032_RAD.osim
  replace_force_set: false
  force_set_files: normalP032_RRA_Actuators.xml
  results_directory: ./results
  output_precision: 8
  initial_time: 1.5
  final_time: 2.57
  solve_for_equilibrium_for_auxiliary_states: false
  maximum_number_of_integrator_steps: 20000
  maximum_integrator_step_size: 1
  minimum_integrator_step_size: 1e-8
  integrator_error_tolerance: 1e-5
  external_loads_file: normalP032_grf.xml
  desired_kinematics_file: ../inverse_kinematics/normalP032_ik.mot
  task_set_file: rra_tasks_walking3.xml
  constraints_file: constraints.xml
  lowpass_cutoff_frequency: 10
  optimizer_algorithm: ipopt
  optimizer_derivative_dx: 0.0001
  optimizer_convergence_criterion: 1e-5
  adjust_com_to_reduce_residuals: true
  adjusted_com_body: torso
  initial_time_for_com_adjustment: -1
  final_time_for_com_adjustment: -1
  cmc_time_window: 0.001
  use_fast_optimization_target: false
  output_model_file: ../skeletal_models/normalP032_RAD.osim
  use_verbose_printing: false
  AnalysisSet:
    BodyKinematics
    Kinematics: step_interval=10 in_degrees=true
