# OpenSim document version 30000
RRATool normalP051:
  model_file: ../../OsimModels/normalP051_RAD.osim
  replace_force_set: false
  force_set_files: normalP051_RRA_Actuators.xml
  results_directory: ./Results_RRA
  output_precision: 8
  initial_time: 1.55
  final_time: 2.41
  solve_for_equilibrium_for_auxiliary_states: false
  maximum_number_of_integrator_steps: 20000
  maximum_integrator_step_size: 1
  minimum_integrator_step_size: 1e-8
  integrator_error_tolerance: 1e-5
  external_loads_file: normalP051_grf.xml
  desired_kinematics_file: ../../IK/normalP051_ik.mot
  task_set_file: rra_tasks_walk_1.xml
  lowpass_cutoff_frequency: 6
  optimizer_algorithm: ipopt
  optimizer_derivative_dx: 0.0001
  optimizer_convergence_criterion: 1e-5
  adjust_com_to_reduce_residuals: true
  adjusted_com_body: torso
  initial_time_for_com_adjustment: -1
  final_time_for_com_adjustment: -1
  cmc_time_window: 0.001
  output_model_file: ../../OsimModels/normalP051_RAD2.osim
  use_verbose_printing: false
  use_fast_optimization_target: true
  AnalysisSet:
    BodyKinematics
    Kinematics: step_interval=10 in_degrees=true
