# OpenSim document version 30000
RRATool normalP05:
  model_file: ../../OsimModels/normalP05_RAD.osim
  replace_force_set: false
  force_set_files: normalP05_RRA_Actuators.xml
  results_directory: ./Results_RRA
  output_precision: 20
  initial_time: 1.48
  final_time: 2.34
  solve_for_equilibrium_for_auxiliary_states: true
  maximum_number_of_integrator_steps: 20000
  maximum_integrator_step_size: 1
  minimum_integrator_step_size: 1e-8
  integrator_error_tolerance: 1e-5
  external_loads_file: normalP05_grf.xml
  desired_kinematics_file: ../../IK/normalP05_ik.mot
  task_set_file: normalP05_RRA_Tasks.xml
  lowpass_cutoff_frequency: 6
  optimizer_algorithm: ipopt
  optimizer_derivative_dx: 0.0001
  optimizer_convergence_criterion: 1e-5
  adjust_com_to_reduce_residuals: true
  adjusted_com_body: torso
  initial_time_for_com_adjustment: -1
  final_time_for_com_adjustment: -1
  cmc_time_window: 0.001
  output_model_file: ../../OsimModels/normalP05_RAD.osim
  use_verbose_printing: false
  AnalysisSet:
    BodyKinematics
    Kinematics: step_interval=10 in_degrees=true
