# OpenSim document version 30000
CMC_TaskSet rraTasks:
  defaults: CMC_Joint default: wrt_body=-1 express_body=-1 active=(true false false) weight=(1 1 1) kp=100 kv=20
      ka=(1 1 1)
  CMC_Joint pelvis_tilt: coordinate=pelvis_tilt weight=25
  CMC_Joint pelvis_list: coordinate=pelvis_list weight=25
  CMC_Joint pelvis_rotation: coordinate=pelvis_rotation weight=25
  CMC_Joint pelvis_tx: coordinate=pelvis_tx weight=5
  CMC_Joint pelvis_ty: coordinate=pelvis_ty weight=5
  CMC_Joint pelvis_tz: coordinate=pelvis_tz weight=5
  CMC_Joint hip_flexion_r: coordinate=hip_flexion_r weight=15
  CMC_Joint hip_adduction_r: coordinate=hip_adduction_r weight=15
  CMC_Joint hip_rotation_r: coordinate=hip_rotation_r weight=15
  CMC_Joint knee_angle_r: coordinate=knee_angle_r weight=1
  CMC_Joint ankle_angle_r: coordinate=ankle_angle_r weight=15
  CMC_Joint subtalar_angle_r: coordinate=subtalar_angle_r weight=5
  CMC_Joint hip_flexion_l: coordinate=hip_flexion_l weight=15
  CMC_Joint hip_adduction_l: coordinate=hip_adduction_l weight=15
  CMC_Joint hip_rotation_l: coordinate=hip_rotation_l weight=15
  CMC_Joint knee_angle_l: coordinate=knee_angle_l weight=1
  CMC_Joint ankle_angle_l: coordinate=ankle_angle_l weight=15
  CMC_Joint subtalar_angle_l: coordinate=subtalar_angle_l weight=5
  CMC_Joint lumbar_extension: coordinate=lumbar_extension weight=5
  CMC_Joint lumbar_bending: coordinate=lumbar_bending weight=5
  CMC_Joint lumbar_rotation: coordinate=lumbar_rotation weight=5
  CMC_Joint arm_flex_r: coordinate=arm_flex_r weight=1
  CMC_Joint arm_add_r: coordinate=arm_add_r weight=1
  CMC_Joint arm_rot_r: coordinate=arm_rot_r weight=1
  CMC_Joint elbow_flex_r: coordinate=elbow_flex_r weight=1
  CMC_Joint pro_sup_r: coordinate=pro_sup_r weight=1
  CMC_Joint arm_flex_l: coordinate=arm_flex_l weight=1
  CMC_Joint arm_add_l: coordinate=arm_add_l weight=1
  CMC_Joint arm_rot_l: coordinate=arm_rot_l weight=1
  CMC_Joint elbow_flex_l: coordinate=elbow_flex_l weight=1
  CMC_Joint pro_sup_l: coordinate=pro_sup_l weight=1
