# OpenSim document version 30000
Model static0015_SCALED:
  credits: Boers, L.S. BSc.
  publications: TBD
  length_units: meters
  force_units: N
  gravity: 0 -9.80665 0
  defaults:
    CoordinateActuator default: optimal_force=300
    PointActuator default: point=(0 0 0) point_is_global=false direction=(-1 0 0) force_is_global=true
        optimal_force=1000
    TorqueActuator default: torque_is_global=true axis=(-1 0 0) optimal_force=1
  BodySet:
    Body ground: mass=0 mass_center=(0 0 0) inertia_xx=0 inertia_yy=0 inertia_zz=0
    Body pelvis: mass=9.087542 mass_center=(-0.0805322 0 0) inertia_xx=0.07833999 inertia_yy=0.07833999
        inertia_zz=0.0461538 meshes=(sacrum.vtp pelvis.vtp l_pelvis.vtp)
      CustomJoint ground_pelvis: parent_body=ground location_in_parent=(0 0 0) location=(0 0 0)
        Coordinate pelvis_tilt: motion_type=rotational default_value=0 range=(-1.570796 1.570796) clamped=true
        Coordinate pelvis_list: motion_type=rotational default_value=0 range=(-1.570796 1.570796) clamped=true
        Coordinate pelvis_rotation: motion_type=rotational default_value=0 range=(-1.570796 1.570796) clamped=true
        Coordinate pelvis_tx: motion_type=translational default_value=0 range=(-5 5) clamped=true
        Coordinate pelvis_ty: motion_type=translational default_value=0 range=(-1 2) clamped=true
        Coordinate pelvis_tz: motion_type=translational default_value=0 range=(-3 3) clamped=true
        SpatialTransform:
          TransformAxis rotation1: coordinates=pelvis_tilt axis=(0 0 1) LinearFunction(coefficients=1 0)
          TransformAxis rotation2: coordinates=pelvis_list axis=(1 0 0) LinearFunction(coefficients=1 0)
          TransformAxis rotation3: coordinates=pelvis_rotation axis=(0 1 0) LinearFunction(coefficients=1 0)
          TransformAxis translation1: coordinates=pelvis_tx axis=(1 0 0) LinearFunction(coefficients=1 0)
          TransformAxis translation2: coordinates=pelvis_ty axis=(0 1 0) LinearFunction(coefficients=1 0)
          TransformAxis translation3: coordinates=pelvis_tz axis=(0 0 1) LinearFunction(coefficients=1 0)
    Body femur_r: mass=7.177283 mass_center=(0 -0.164613 0) inertia_xx=0.09939081 inertia_yy=0.03042068
        inertia_zz=0.09939081 meshes=femur_r.vtp
      CustomJoint hip_r: parent_body=pelvis location_in_parent=(-0.0805322 -0.05994674 0.08222834) location=(0 0 0)
        Coordinate hip_flexion_r: motion_type=rotational default_value=0 range=(-2.094395 2.094395) clamped=true
        Coordinate hip_adduction_r: motion_type=rotational default_value=0 range=(-2.094395 2.094395) clamped=true
        Coordinate hip_rotation_r: motion_type=rotational default_value=0 range=(-2.094395 2.094395) clamped=true
        SpatialTransform: axes_held_at_zero=(translation1 translation2 translation3)
          TransformAxis rotation1: coordinates=hip_flexion_r axis=(0 0 1) LinearFunction(coefficients=1 0)
          TransformAxis rotation2: coordinates=hip_adduction_r axis=(1 0 0) LinearFunction(coefficients=1 0)
          TransformAxis rotation3: coordinates=hip_rotation_r axis=(0 1 0) LinearFunction(coefficients=1 0)
    Body tibia_r: mass=2.860836 mass_center=(0 -0.175667 0) inertia_xx=0.03445691 inertia_yy=0.00353788
        inertia_zz=0.03445691 meshes=(tibia_r.vtp fibula_r.vtp)
      CustomJoint knee_r: parent_body=femur_r location_in_parent=(0 0 0) location=(0 0 0)
        Coordinate knee_angle_r: motion_type=rotational default_value=0 range=(-2.094395 0.1745329) clamped=true
        SpatialTransform: axes_held_at_zero=(rotation2 rotation3 translation3)
          TransformAxis rotation1: coordinates=knee_angle_r axis=(0 0 1) LinearFunction(coefficients=1 0)
          TransformAxis translation1: coordinates=knee_angle_r axis=(1 0 0)
            MultiplierFunction: scale=1.059799
              SimmSpline: x=(-2.0944 -1.74533 -1.39626 -1.0472 -0.698132 -0.349066 -0.174533 0.197344 0.337395 0.490178 1.52146 2.0944)
                  y=(-0.0032 0.00179 0.00411 0.0041 0.00212 -0.001 -0.0031 -0.005227 -0.005435 -0.005574 -0.005435 -0.00525)
          TransformAxis translation2: coordinates=knee_angle_r axis=(0 1 0)
            MultiplierFunction: scale=0.9683117
              SimmSpline: x=(-2.0944 -1.22173 -0.523599 -0.349066 -0.174533 0.159149 2.0944)
                  y=(-0.4226 -0.4082 -0.399 -0.3976 -0.3966 -0.395264 -0.396)
    Body talus_r: mass=0.07716347 mass_center=(0 0 0) inertia_xx=0.0007716398 inertia_yy=0.0007716398
        inertia_zz=0.0007716398 meshes=talus_rv.vtp
      CustomJoint ankle_r: parent_body=tibia_r location_in_parent=(0 -0.4045891 0) location=(0 0 0)
        Coordinate ankle_angle_r: motion_type=rotational default_value=0 range=(-1.570796 1.570796) clamped=true
        SpatialTransform: axes_held_at_zero=(rotation2 rotation3 translation1 translation2 translation3)
          TransformAxis rotation1: coordinates=ankle_angle_r axis=(-0.1050135 -0.1740224 0.9791263)
              LinearFunction(coefficients=1 0)
    Body calcn_r: mass=0.9645434 mass_center=(0.0985651 0.03 0) inertia_xx=0.00115318 inertia_yy=0.002975486
        inertia_zz=0.002975486 meshes=foot.vtp
      CustomJoint subtalar_r: parent_body=talus_r location_in_parent=(-0.04877 -0.04195 0.00792) location=(0 0 0)
        Coordinate subtalar_angle_r: motion_type=rotational default_value=0 range=(-1.570796 1.570796) clamped=true
            locked=true
        SpatialTransform: axes_held_at_zero=(rotation2 rotation3 translation1 translation2 translation3)
          TransformAxis rotation1: coordinates=subtalar_angle_r axis=(0.7871796 0.6047475 -0.1209495)
              LinearFunction(coefficients=1 0)
    Body toes_r: mass=0.1671361 mass_center=(0.0346 0.006 -0.0186807) inertia_xx=8.236998e-5 inertia_yy=0.000156931
        inertia_zz=0.000156931 meshes=bofoot.vtp
      CustomJoint mtp_r: parent_body=calcn_r location_in_parent=(0.1762345 -0.002 0.001152864) location=(0 0 0)
        Coordinate mtp_angle_r: motion_type=rotational default_value=0 range=(-1.570796 1.570796) clamped=true
            locked=true
        SpatialTransform: axes_held_at_zero=(rotation2 rotation3 translation1 translation2 translation3)
          TransformAxis rotation1: coordinates=mtp_angle_r axis=(-0.5809544 0 0.8139361)
              LinearFunction(coefficients=1 0)
    Body femur_l: mass=7.177283 mass_center=(0 -0.163276 0) inertia_xx=0.09486077 inertia_yy=0.02408397
        inertia_zz=0.09486077 meshes=femur_l.vtp
      CustomJoint hip_l: parent_body=pelvis location_in_parent=(-0.0805322 -0.05994674 -0.08222834) location=(0 0 0)
        Coordinate hip_flexion_l: motion_type=rotational default_value=0 range=(-2.094395 2.094395) clamped=true
        Coordinate hip_adduction_l: motion_type=rotational default_value=0 range=(-2.094395 2.094395) clamped=true
        Coordinate hip_rotation_l: motion_type=rotational default_value=0 range=(-2.094395 2.094395) clamped=true
        SpatialTransform: axes_held_at_zero=(translation1 translation2 translation3)
          TransformAxis rotation1: coordinates=hip_flexion_l axis=(0 0 1) LinearFunction(coefficients=1 0)
          TransformAxis rotation2: coordinates=hip_adduction_l axis=(-1 0 0) LinearFunction(coefficients=1 0)
          TransformAxis rotation3: coordinates=hip_rotation_l axis=(0 -1 0) LinearFunction(coefficients=1 0)
    Body tibia_l: mass=2.860836 mass_center=(0 -0.177638 0) inertia_xx=0.03516527 inertia_yy=0.003479411
        inertia_zz=0.03516527 meshes=(tibia_l.vtp fibula_l.vtp)
      CustomJoint knee_l: parent_body=femur_l location_in_parent=(0 0 0) location=(0 0 0)
        Coordinate knee_angle_l: motion_type=rotational default_value=0 range=(-2.094395 0.1745329) clamped=true
        SpatialTransform: axes_held_at_zero=(rotation2 rotation3 translation3)
          TransformAxis rotation1: coordinates=knee_angle_l axis=(0 0 1) LinearFunction(coefficients=1 0)
          TransformAxis translation1: coordinates=knee_angle_l axis=(1 0 0)
            MultiplierFunction: scale=0.9429815
              SimmSpline: x=(-2.0944 -1.74533 -1.39626 -1.0472 -0.698132 -0.349066 -0.174533 0.197344 0.337395 0.490178 1.52146 2.0944)
                  y=(-0.0032 0.00179 0.00411 0.0041 0.00212 -0.001 -0.0031 -0.005227 -0.005435 -0.005574 -0.005435 -0.00525)
          TransformAxis translation2: coordinates=knee_angle_l axis=(0 1 0)
            MultiplierFunction: scale=0.9604481
              SimmSpline: x=(-2.0944 -1.22173 -0.523599 -0.349066 -0.174533 0.159149 2.0944)
                  y=(-0.4226 -0.4082 -0.399 -0.3976 -0.3966 -0.395264 -0.396)
    Body talus_l: mass=0.07716347 mass_center=(0 0 0) inertia_xx=0.0007716398 inertia_yy=0.0007716398
        inertia_zz=0.0007716398 meshes=talus_lv.vtp
      CustomJoint ankle_l: parent_body=tibia_l location_in_parent=(0 -0.4091283 0) location=(0 0 0)
        Coordinate ankle_angle_l: motion_type=rotational default_value=0 range=(-1.047198 1.047198) clamped=true
        SpatialTransform: axes_held_at_zero=(rotation2 rotation3 translation1 translation2 translation3)
          TransformAxis rotation1: coordinates=ankle_angle_l axis=(0.1050135 0.1740224 0.9791263)
              LinearFunction(coefficients=1 0)
    Body calcn_l: mass=0.9645434 mass_center=(0.0991008 0.03 0) inertia_xx=0.001175714 inertia_yy=0.003012897
        inertia_zz=0.003012897 meshes=l_foot.vtp
      CustomJoint subtalar_l: parent_body=talus_l location_in_parent=(-0.04877 -0.04195 -0.00792) location=(0 0 0)
        Coordinate subtalar_angle_l: motion_type=rotational default_value=0 range=(-1.570796 1.570796) clamped=true
            locked=true
        SpatialTransform: axes_held_at_zero=(rotation2 rotation3 translation1 translation2 translation3)
          TransformAxis rotation1: coordinates=subtalar_angle_l axis=(-0.7871796 -0.6047475 -0.1209495)
              LinearFunction(coefficients=1 0)
    Body toes_l: mass=0.1671361 mass_center=(0.0346 0.006 0.0190457) inertia_xx=8.397955e-5 inertia_yy=0.0001577358
        inertia_zz=0.0001577358 meshes=l_bofoot.vtp
      CustomJoint mtp_l: parent_body=calcn_l location_in_parent=(0.1771922 -0.002 -0.001175392) location=(0 0 0)
        Coordinate mtp_angle_l: motion_type=rotational default_value=0 range=(-1.047198 1.047198) clamped=true
            locked=true
        SpatialTransform: axes_held_at_zero=(rotation2 rotation3 translation1 translation2 translation3)
          TransformAxis rotation1: coordinates=mtp_angle_l axis=(0.5809544 0 0.8139361)
              LinearFunction(coefficients=1 0)
    Body torso: mass=20.70034 mass_center=(-0.0365574 0.286121 -4.33076e-7) inertia_xx=1.169012 inertia_yy=0.9848515
        inertia_zz=1.169012 meshes=(hat_spine.vtp hat_jaw.vtp hat_skull.vtp hat_ribs_scap.vtp)
      CustomJoint back: parent_body=pelvis location_in_parent=(-0.1147043 0.07391315 0) location=(0 0 0)
        Coordinate lumbar_extension: motion_type=rotational default_value=0 range=(-1.570796 1.570796) clamped=true
        Coordinate lumbar_bending: motion_type=rotational default_value=0 range=(-1.570796 1.570796) clamped=true
        Coordinate lumbar_rotation: motion_type=rotational default_value=0 range=(-1.570796 1.570796) clamped=true
        SpatialTransform: axes_held_at_zero=(translation1 translation2 translation3)
          TransformAxis rotation1: coordinates=lumbar_extension axis=(0 0 1) LinearFunction(coefficients=1 0)
          TransformAxis rotation2: coordinates=lumbar_bending axis=(1 0 0) LinearFunction(coefficients=1 0)
          TransformAxis rotation3: coordinates=lumbar_rotation axis=(0 1 0) LinearFunction(coefficients=1 0)
    Body humerus_r: mass=1.568348 mass_center=(0 -0.159483 0) inertia_xx=0.008759661 inertia_yy=0.003179928
        inertia_zz=0.008759661 meshes=humerus_rv.vtp
      CustomJoint acromial_r: parent_body=torso location_in_parent=(0.003844839 0.332169 0.2356632) location=(0 0 0)
        Coordinate arm_flex_r: motion_type=rotational default_value=0 range=(-1.570796 1.570796) clamped=true
        Coordinate arm_add_r: motion_type=rotational default_value=0 range=(-2.094395 1.570796) clamped=true
        Coordinate arm_rot_r: motion_type=rotational default_value=0 range=(-1.570796 1.570796) clamped=true
        SpatialTransform: axes_held_at_zero=(translation1 translation2 translation3)
          TransformAxis rotation1: coordinates=arm_flex_r axis=(0 0 1) LinearFunction(coefficients=1 0)
          TransformAxis rotation2: coordinates=arm_add_r axis=(1 0 0) LinearFunction(coefficients=1 0)
          TransformAxis rotation3: coordinates=arm_rot_r axis=(0 1 0) LinearFunction(coefficients=1 0)
    Body ulna_r: mass=0.4687681 mass_center=(0 -0.104484 0) inertia_xx=0.001776939 inertia_yy=0.0004768734
        inertia_zz=0.001776939 meshes=ulna_rv.vtp
      CustomJoint elbow_r: parent_body=humerus_r location_in_parent=(0.013144 -0.2775391 -0.009595) location=(0 0 0)
        Coordinate elbow_flex_r: motion_type=rotational default_value=0 range=(0 2.618) clamped=true
        SpatialTransform: axes_held_at_zero=(rotation2 rotation3 translation1 translation2 translation3)
          TransformAxis rotation1: coordinates=elbow_flex_r axis=(0.226047 0.022269 0.9738618)
              LinearFunction(coefficients=1 0)
    Body radius_r: mass=0.4687681 mass_center=(0 -0.104484 0) inertia_xx=0.001776939 inertia_yy=0.0004768734
        inertia_zz=0.001776939 meshes=radius_rv.vtp
      CustomJoint radioulnar_r: parent_body=ulna_r location_in_parent=(-0.006727 -0.01127587 0.026083) location=(0 0 0)
        Coordinate pro_sup_r: motion_type=rotational default_value=0 range=(0 1.570796) clamped=true
        SpatialTransform: axes_held_at_zero=(rotation2 rotation3 translation1 translation2 translation3)
          TransformAxis rotation1: coordinates=pro_sup_r axis=(0.05639803 0.9984065 0.001952)
              LinearFunction(coefficients=1 0)
    Body hand_r: mass=0.3530229 mass_center=(0 -0.0590321 0) inertia_xx=0.0005697181 inertia_yy=0.000422087
        inertia_zz=0.0005697181
        meshes=(pisiform_rvs.vtp lunate_rvs.vtp scaphoid_rvs.vtp triquetrum_rvs.vtp hamate_rvs.vtp capitate_rvs.vtp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)
      CustomJoint radius_hand_r: parent_body=radius_r location_in_parent=(-0.008797 -0.2044525 0.01361)
          location=(0 0 0)
        Coordinate wrist_flex_r: motion_type=rotational default_value=0 range=(-1.22173 1.22173) clamped=true
            locked=true
        Coordinate wrist_dev_r: motion_type=rotational default_value=0 range=(-0.4363323 0.6108652) clamped=true
            locked=true
        SpatialTransform: axes_held_at_zero=(rotation3 translation1 translation2 translation3)
          TransformAxis rotation1: coordinates=wrist_flex_r axis=(0 0 1) LinearFunction(coefficients=1 0)
          TransformAxis rotation2: coordinates=wrist_dev_r axis=(1 0 0) LinearFunction(coefficients=1 0)
    Body humerus_l: mass=1.568348 mass_center=(0 -0.166529 0) inertia_xx=0.009407108 inertia_yy=0.003179928
        inertia_zz=0.009407108 meshes=humerus_lv.vtp
      CustomJoint acromial_l: parent_body=torso location_in_parent=(0.003844839 0.332169 -0.2356632) location=(0 0 0)
        Coordinate arm_flex_l: motion_type=rotational default_value=0 range=(-1.570796 1.570796) clamped=true
        Coordinate arm_add_l: motion_type=rotational default_value=0 range=(-2.094395 1.570796) clamped=true
        Coordinate arm_rot_l: motion_type=rotational default_value=0 range=(-1.570796 1.570796) clamped=true
        SpatialTransform: axes_held_at_zero=(translation1 translation2 translation3)
          TransformAxis rotation1: coordinates=arm_flex_l axis=(0 0 1) LinearFunction(coefficients=1 0)
          TransformAxis rotation2: coordinates=arm_add_l axis=(-1 0 0) LinearFunction(coefficients=1 0)
          TransformAxis rotation3: coordinates=arm_rot_l axis=(0 -1 0) LinearFunction(coefficients=1 0)
    Body ulna_l: mass=0.4687681 mass_center=(0 -0.105031 0) inertia_xx=0.001793074 inertia_yy=0.0004768734
        inertia_zz=0.001793074 meshes=ulna_lv.vtp
      CustomJoint elbow_l: parent_body=humerus_l location_in_parent=(0.013144 -0.2897996 0.009595) location=(0 0 0)
        Coordinate elbow_flex_l: motion_type=rotational default_value=0 range=(0 2.618) clamped=true
        SpatialTransform: axes_held_at_zero=(rotation2 rotation3 translation1 translation2 translation3)
          TransformAxis rotation1: coordinates=elbow_flex_l axis=(-0.226047 -0.022269 0.9738618)
              LinearFunction(coefficients=1 0)
    Body radius_l: mass=0.4687681 mass_center=(0 -0.105031 0) inertia_xx=0.001793074 inertia_yy=0.0004768734
        inertia_zz=0.001793074 meshes=radius_lv.vtp
      CustomJoint radioulnar_l: parent_body=ulna_l location_in_parent=(-0.006727 -0.01133485 -0.026083)
          location=(0 0 0)
        Coordinate pro_sup_l: motion_type=rotational default_value=0 range=(0 1.570796) clamped=true
        SpatialTransform: axes_held_at_zero=(rotation2 rotation3 translation1 translation2 translation3)
          TransformAxis rotation1: coordinates=pro_sup_l axis=(-0.05639803 -0.9984065 0.001952)
              LinearFunction(coefficients=1 0)
    Body hand_l: mass=0.3530229 mass_center=(0 -0.0593408 0) inertia_xx=0.0005734796 inertia_yy=0.000422087
        inertia_zz=0.0005734796
        meshes=(pisiform_lvs.vtp lunate_lvs.vtp scaphoid_lvs.vtp triquetrum_lvs.vtp hamate_lvs.vtp capitate_lvs.vtp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)
      CustomJoint radius_hand_l: parent_body=radius_l location_in_parent=(-0.008797 -0.2055218 -0.01361)
          location=(0 0 0)
        Coordinate wrist_flex_l: motion_type=rotational default_value=0 range=(-1.22173 1.22173) clamped=true
            locked=true
        Coordinate wrist_dev_l: motion_type=rotational default_value=0 range=(-0.4363323 0.6108652) clamped=true
            locked=true
        SpatialTransform: axes_held_at_zero=(rotation3 translation1 translation2 translation3)
          TransformAxis rotation1: coordinates=wrist_flex_l axis=(0 0 1) LinearFunction(coefficients=1 0)
          TransformAxis rotation2: coordinates=wrist_dev_l axis=(-1 0 0) LinearFunction(coefficients=1 0)
  ForceSet:
    CoordinateActuator pelvis_tilt_reserve: coordinate=pelvis_tilt optimal_force=250
    CoordinateActuator pelvis_list_reserve: coordinate=pelvis_list optimal_force=250
    CoordinateActuator pelvis_rotation_reserve: coordinate=pelvis_rotation optimal_force=250
    CoordinateActuator pelvis_tx_reserve: coordinate=pelvis_tx optimal_force=250
    CoordinateActuator pelvis_ty_reserve: coordinate=pelvis_ty optimal_force=250
    CoordinateActuator pelvis_tz_reserve: coordinate=pelvis_tz optimal_force=250
    CoordinateActuator hip_flexion_r_reserve: coordinate=hip_flexion_r optimal_force=250
    CoordinateActuator hip_adduction_r_reserve: coordinate=hip_adduction_r optimal_force=250
    CoordinateActuator hip_rotation_r_reserve: coordinate=hip_rotation_r optimal_force=250
    CoordinateActuator knee_angle_r_reserve: coordinate=knee_angle_r optimal_force=250
    CoordinateActuator ankle_angle_r_reserve: coordinate=ankle_angle_r optimal_force=250
    CoordinateActuator hip_flexion_l_reserve: coordinate=hip_flexion_l optimal_force=250
    CoordinateActuator hip_adduction_l_reserve: coordinate=hip_adduction_l optimal_force=250
    CoordinateActuator hip_rotation_l_reserve: coordinate=hip_rotation_l optimal_force=250
    CoordinateActuator knee_angle_l_reserve: coordinate=knee_angle_l optimal_force=250
    CoordinateActuator ankle_angle_l_reserve: coordinate=ankle_angle_l optimal_force=250
    CoordinateActuator lumbar_extension_reserve: coordinate=lumbar_extension optimal_force=250
    CoordinateActuator lumbar_bending_reserve: coordinate=lumbar_bending optimal_force=250
    CoordinateActuator lumbar_rotation_reserve: coordinate=lumbar_rotation optimal_force=250
    CoordinateActuator arm_flex_r_reserve: coordinate=arm_flex_r optimal_force=150
    CoordinateActuator arm_add_r_reserve: coordinate=arm_add_r optimal_force=150
    CoordinateActuator arm_rot_r_reserve: coordinate=arm_rot_r optimal_force=150
    CoordinateActuator elbow_flex_r_reserve: coordinate=elbow_flex_r optimal_force=150
    CoordinateActuator pro_sup_r_reserve: coordinate=pro_sup_r optimal_force=150
    CoordinateActuator arm_flex_l_reserve: coordinate=arm_flex_l optimal_force=150
    CoordinateActuator arm_add_l_reserve: coordinate=arm_add_l optimal_force=150
    CoordinateActuator arm_rot_l_reserve: coordinate=arm_rot_l optimal_force=150
    CoordinateActuator elbow_flex_l_reserve: coordinate=elbow_flex_l optimal_force=150
    CoordinateActuator pro_sup_l_reserve: coordinate=pro_sup_l optimal_force=150
    PointActuator FX: body=pelvis point=(-0.0805322 0 0) point_is_global=false direction=(1 0 0) force_is_global=true
        optimal_force=4
    PointActuator FY: body=pelvis point=(-0.0805322 0 0) point_is_global=false direction=(0 1 0) force_is_global=true
        optimal_force=8
    PointActuator FZ: body=pelvis point=(-0.0805322 0 0) point_is_global=false direction=(0 0 1) force_is_global=true
        optimal_force=4
    TorqueActuator MX: bodyA=pelvis bodyB=ground axis=(1 0 0) optimal_force=2
    TorqueActuator MY: bodyA=pelvis bodyB=ground axis=(0 1 0) optimal_force=2
    TorqueActuator MZ: bodyA=pelvis bodyB=ground axis=(0 0 1) optimal_force=2
    HuntCrossleyForce Foot_Ground_R1: transition_velocity=0.1
      ContactParametersSet contact_parameters:
        ContactParameters: geometry=(ground right_1) stiffness=1000000 dissipation=1.5 static_friction=0.8
            dynamic_friction=0.8 viscous_friction=0
    HuntCrossleyForce Foot_Ground_L1: transition_velocity=0.1
      ContactParametersSet contact_parameters:
        ContactParameters: geometry=(ground left_1) stiffness=1000000 dissipation=1.5 static_friction=0.8
            dynamic_friction=0.8 viscous_friction=0
    HuntCrossleyForce Foot_Ground_R2: transition_velocity=0.1
      ContactParametersSet contact_parameters:
        ContactParameters: geometry=(ground right_2) stiffness=1000000 dissipation=1.5 static_friction=0.8
            dynamic_friction=0.8 viscous_friction=0
    HuntCrossleyForce Foot_Ground_L2: transition_velocity=0.1
      ContactParametersSet contact_parameters:
        ContactParameters: geometry=(ground left_2) stiffness=1000000 dissipation=1.5 static_friction=0.8
            dynamic_friction=0.8 viscous_friction=0
    HuntCrossleyForce Foot_Ground_R3: transition_velocity=0.1
      ContactParametersSet contact_parameters:
        ContactParameters: geometry=(ground right_3) stiffness=1000000 dissipation=1.5 static_friction=0.8
            dynamic_friction=0.8 viscous_friction=0
    HuntCrossleyForce Foot_Ground_L3: transition_velocity=0.1
      ContactParametersSet contact_parameters:
        ContactParameters: geometry=(ground left_3) stiffness=1000000 dissipation=1.5 static_friction=0.8
            dynamic_friction=0.8 viscous_friction=0
    HuntCrossleyForce Foot_Ground_R4: transition_velocity=0.1
      ContactParametersSet contact_parameters:
        ContactParameters: geometry=(ground right_4) stiffness=1000000 dissipation=1.5 static_friction=0.8
            dynamic_friction=0.8 viscous_friction=0
    HuntCrossleyForce Foot_Ground_L4: transition_velocity=0.1
      ContactParametersSet contact_parameters:
        ContactParameters: geometry=(ground left_4) stiffness=1000000 dissipation=1.5 static_friction=0.8
            dynamic_friction=0.8 viscous_friction=0
    HuntCrossleyForce Foot_Ground_R5: transition_velocity=0.1
      ContactParametersSet contact_parameters:
        ContactParameters: geometry=(ground right_5) stiffness=1000000 dissipation=1.5 static_friction=0.8
            dynamic_friction=0.8 viscous_friction=0
    HuntCrossleyForce Foot_Ground_L5: transition_velocity=0.1
      ContactParametersSet contact_parameters:
        ContactParameters: geometry=(ground left_5) stiffness=1000000 dissipation=1.5 static_friction=0.8
            dynamic_friction=0.8 viscous_friction=0
    HuntCrossleyForce Foot_Ground_R6: transition_velocity=0.1
      ContactParametersSet contact_parameters:
        ContactParameters: geometry=(ground right_6) stiffness=1000000 dissipation=1.5 static_friction=0.8
            dynamic_friction=0.8 viscous_friction=0
    HuntCrossleyForce Foot_Ground_L6: transition_velocity=0.1
      ContactParametersSet contact_parameters:
        ContactParameters: geometry=(ground left_6) stiffness=1000000 dissipation=1.5 static_friction=0.8
            dynamic_friction=0.8 viscous_friction=0
  MarkerSet:
    Marker RM1D: toes_r (0.00681936 0.0159963 -0.0297276) fixed=true
    Marker RM5D: toes_r (-0.0360916 0.010788 0.0429317) fixed=true
    Marker RM2B: calcn_r (0.1214 0.0411582 -0.0129292) fixed=true
    Marker LM1D: toes_l (0.00681936 0.0159963 0.0303085) fixed=true
    Marker LM5D: toes_l (-0.0360916 0.010788 -0.0437706) fixed=true
    Marker LM2B: calcn_l (0.122059 0.0411582 0.0131818) fixed=true
    Marker RCAL: calcn_r (-0.0139522 0.01944 -0.00733388) fixed=true
    Marker LCAL: calcn_l (-0.014028 0.01944 0.00747719) fixed=true
    Marker RLMAL: tibia_r (-0.00817075 -0.384361 0.0488067) fixed=true
    Marker LLMAL: tibia_l (-0.00817075 -0.388674 -0.0480001) fixed=true
    Marker RMMAL: tibia_r (0.00884135 -0.369493 -0.0299828) fixed=true
    Marker LMMAL: tibia_l (0.00884135 -0.373639 0.0294873) fixed=true
    Marker RFLE: femur_r (0 -0.383414 0.0551578) fixed=true
    Marker RFME: femur_r (0.000473807 -0.381229 -0.0553079) fixed=true
    Marker LFME: femur_l (0.000421581 -0.378133 0.0492116) fixed=true
    Marker LFLE: femur_l (0 -0.3803 -0.0490779) fixed=true
    Marker RHFIB: tibia_r (-0.0144503 -0.054884 0.0760374)
    Marker LHFIB: tibia_l (-0.0279802 -0.0611581 -0.077363)
    Marker RSSH: tibia_r (0.0186973 -0.140319 -0.00285609)
    Marker LSSH: tibia_l (0.0231264 -0.262046 -0.0062847)
    Marker RTAD: femur_r (0.0951967 -0.251222 0.0248468)
    Marker LTAD: femur_l (0.0953939 -0.239199 -0.0276599)
    Marker RTPP: femur_r (-0.0843674 -0.185113 0.026682)
    Marker LTPP: femur_l (-0.0930363 -0.169622 -0.0108371)
    Marker RPSIS: pelvis (-0.177653 0.0419599 0.0429288) fixed=true
    Marker LPSIS: pelvis (-0.177653 0.0419599 -0.0429288) fixed=true
    Marker RASIS: pelvis (0.0142132 0.0133985 0.119963) fixed=true
    Marker LASIS: pelvis (0.0142132 0.0133985 -0.119963) fixed=true
    Marker T10: torso (-0.0988989 0.133684 -0.000748312)
    Marker T2: torso (-0.106166 0.351066 -0.00431947)
    Marker IJ: torso (0.0495834 0.354063 0.000736852)
    Marker SA: torso (0.0715227 0.310751 0.00118234)
    Marker RACR: torso (-0.0286197 0.353312 0.183835)
    Marker LACR: torso (-0.0450833 0.365206 -0.188287)
    Marker RHLE: humerus_r (0.00832132 -0.271237 -0.0418442) fixed=true
    Marker LHLE: humerus_l (0.00832132 -0.28322 0.0418442) fixed=true
    Marker RUSP: ulna_r (-0.0189607 -0.212824 0.075386) fixed=true
    Marker LUSP: ulna_l (-0.0189607 -0.213937 -0.075386) fixed=true
  ContactGeometrySet:
    ContactHalfSpace ground: body_name=ground location=(0 -0.01 0) orientation=(0 0 -1.570796)
    ContactSphere right_1: body_name=calcn_r location=(0.005146878 -0.004739022 0.001824542) radius=0.03952248
    ContactSphere left_1: body_name=calcn_l location=(0.005146878 -0.004739022 -0.001824542) radius=0.03952248
    ContactSphere right_2: body_name=calcn_r location=(0.1553838 -0.004739022 0.006143046) radius=0.03161532
    ContactSphere left_2: body_name=calcn_l location=(0.1553838 -0.004739022 -0.006143046) radius=0.03161532
    ContactSphere right_3: body_name=calcn_r location=(0.156701 -0.004739022 0.06759871) radius=0.03161532
    ContactSphere left_3: body_name=calcn_l location=(0.156701 -0.004739022 -0.06759871) radius=0.03161532
    ContactSphere right_4: body_name=toes_r location=(-0.003854913 -0.004739022 -0.05488734) radius=0.03161532
    ContactSphere left_4: body_name=toes_l location=(-0.003854913 -0.004739022 0.05488734) radius=0.03161532
    ContactSphere right_5: body_name=calcn_r location=(0.05854485 -0.004739022 -0.02322773) radius=0.03161532
    ContactSphere left_5: body_name=calcn_l location=(0.05854485 -0.004739022 0.02322773) radius=0.03161532
    ContactSphere right_6: body_name=toes_r location=(-0.007123686 -0.004739022 0.04017607) radius=0.03161532
    ContactSphere left_6: body_name=toes_l location=(-0.007123686 -0.004739022 -0.04017607) radius=0.03161532
  ControllerSet Controllers:
    PrescribedController: actuator_list=(pelvis_tilt_reserve pelvis_list_reserve pelvis_rotation_reserve pelvis_tx_reserve pelvis_ty_reserve pelvis_tz_reserve hip_flexion_r_reserve hip_adduction_r_reserve hip_rotation_r_reserve knee_angle_r_reserve ankle_angle_r_reserve hip_flexion_l_reserve hip_adduction_l_reserve hip_rotation_l_reserve knee_angle_l_reserve ankle_angle_l_reserve lumbar_extension_reserve lumbar_bending_reserve lumbar_rotation_reserve arm_flex_r_reserve arm_add_r_reserve arm_rot_r_reserve elbow_flex_r_reserve pro_sup_r_reserve arm_flex_l_reserve arm_add_l_reserve arm_rot_l_reserve elbow_flex_l_reserve pro_sup_l_reserve FX FY FZ MX MY MZ)
      FunctionSet ControlFunctions: Constant(value=1) Constant(value=1) Constant(value=1) Constant(value=1)
          Constant(value=1) Constant(value=1) Constant(value=1) Constant(value=1) Constant(value=1) Constant(value=1)
          Constant(value=1) Constant(value=1) Constant(value=1) Constant(value=1) Constant(value=1) Constant(value=1)
          Constant(value=1) Constant(value=1) Constant(value=1) Constant(value=1) Constant(value=1) Constant(value=1)
          Constant(value=1) Constant(value=1) Constant(value=1) Constant(value=1) Constant(value=1) Constant(value=1)
          Constant(value=1) Constant(value=1) Constant(value=1) Constant(value=1) Constant(value=1) Constant(value=1)
          Constant(value=1)
