# OpenSim document version 30000
AnalyzeTool normal0021_Fminco:
  model_file: ../OsimModels/normal0021_RAD.osim
  replace_force_set: true
  force_set_files: normal0021_fwd_Actuators.xml
  results_directory: ./DCResults
  output_precision: 20
  initial_time: 1.45
  final_time: 2.25
  solve_for_equilibrium_for_auxiliary_states: false
  states_file: FminconOptStates_111Nodes_9657DVs_normal0021_RAD.sto
  use_verbose_printing: false
  AnalysisSet:
    Actuation: step_interval=1 in_degrees=true
    BodyKinematics: step_interval=1 in_degrees=true
  ControllerSet:
    ControlSetController: enable_controller=true controls_file=FminconOptContrl_111Nodes_9657DVs_normal0021_RAD.sto
