# OpenSim document version 30000
AnalyzeTool normal0026_Fsolve:
  model_file: ../OsimModels/normal0026_RAD.osim
  replace_force_set: true
  force_set_files: normal0026_fwd_Actuators.xml
  results_directory: ./DCResults
  output_precision: 20
  initial_time: 1.39
  final_time: 2.31
  solve_for_equilibrium_for_auxiliary_states: false
  states_file: FsolveOptStates_111Nodes_9657DVs_normal0026_RAD.sto
  use_verbose_printing: false
  AnalysisSet:
    Actuation: step_interval=1 in_degrees=true
  ControllerSet:
    ControlSetController: enable_controller=true controls_file=FsolveOptContrl_111Nodes_9657DVs_normal0026_RAD.sto
