# OpenSim document version 30000
AnalyzeTool normalP032_Fminco:
  model_file: ../skeletal_models/normalP032_RAD.osim
  replace_force_set: false
  force_set_files: normalP032_RRA_Actuators.xml
  results_directory: ./DCResults
  output_precision: 8
  initial_time: 1.506
  final_time: 2.559
  solve_for_equilibrium_for_auxiliary_states: false
  states_file: FminconOptStates_80Nodes_6960DVs_normalP032_RAD.sto
  use_verbose_printing: false
  AnalysisSet:
    Actuation: step_interval=1 in_degrees=true
    BodyKinematics: step_interval=1 in_degrees=true
  ControllerSet:
    ControlSetController: enable_controller=true controls_file=FminconOptContrl_80Nodes_6960DVs_normalP032_RAD.sto
