# OpenSim document version 30000
ForceSet Lowerbody_resids:
  PointActuator FX: direction=(1 0 0) optimal_force=4 body=pelvis point=(-0.0805322 0 0) point_is_global=false
      force_is_global=true
  PointActuator FY: direction=(0 1 0) optimal_force=8 body=pelvis point=(-0.0805322 0 0) point_is_global=false
      force_is_global=true
  PointActuator FZ: direction=(0 0 1) optimal_force=4 body=pelvis point=(-0.0805322 0 0) point_is_global=false
      force_is_global=true
  TorqueActuator MX: axis=(1 0 0) bodyA=pelvis bodyB=ground optimal_force=2
  TorqueActuator MY: axis=(0 1 0) bodyA=pelvis bodyB=ground optimal_force=2
  TorqueActuator MZ: axis=(0 0 1) bodyA=pelvis bodyB=ground optimal_force=2
  CoordinateActuator pelvis_tilt_reserve: coordinate=pelvis_tilt optimal_force=250
  CoordinateActuator pelvis_list_reserve: coordinate=pelvis_list optimal_force=250
  CoordinateActuator pelvis_rotation_reserve: coordinate=pelvis_rotation optimal_force=250
  CoordinateActuator pelvis_tx_reserve: coordinate=pelvis_tx optimal_force=250
  CoordinateActuator pelvis_ty_reserve: coordinate=pelvis_ty optimal_force=250
  CoordinateActuator pelvis_tz_reserve: coordinate=pelvis_tz optimal_force=250
  CoordinateActuator hip_flexion_r_reserve: coordinate=hip_flexion_r optimal_force=250
  CoordinateActuator hip_adduction_r_reserve: coordinate=hip_adduction_r optimal_force=250
  CoordinateActuator hip_rotation_r_reserve: coordinate=hip_rotation_r optimal_force=250
  CoordinateActuator knee_angle_r_reserve: coordinate=knee_angle_r optimal_force=250
  CoordinateActuator ankle_angle_r_reserve: coordinate=ankle_angle_r optimal_force=250
  CoordinateActuator subtalar_angle_r_reserve: coordinate=subtalar_angle_r optimal_force=250
  CoordinateActuator hip_flexion_l_reserve: coordinate=hip_flexion_l optimal_force=250
  CoordinateActuator hip_adduction_l_reserve: coordinate=hip_adduction_l optimal_force=250
  CoordinateActuator hip_rotation_l_reserve: coordinate=hip_rotation_l optimal_force=250
  CoordinateActuator knee_angle_l_reserve: coordinate=knee_angle_l optimal_force=250
  CoordinateActuator ankle_angle_l_reserve: coordinate=ankle_angle_l optimal_force=250
  CoordinateActuator subtalar_angle_l_reserve: coordinate=subtalar_angle_l optimal_force=250
  CoordinateActuator lumbar_extension_reserve: coordinate=lumbar_extension optimal_force=250
  CoordinateActuator lumbar_bending_reserve: coordinate=lumbar_bending optimal_force=250
  CoordinateActuator lumbar_rotation_reserve: coordinate=lumbar_rotation optimal_force=250
  CoordinateActuator arm_flex_r_reserve: coordinate=arm_flex_r optimal_force=150
  CoordinateActuator arm_add_r_reserve: coordinate=arm_add_r optimal_force=150
  CoordinateActuator arm_rot_r_reserve: coordinate=arm_rot_r optimal_force=150
  CoordinateActuator elbow_flex_r_reserve: coordinate=elbow_flex_r optimal_force=150
  CoordinateActuator pro_sup_r_reserve: coordinate=pro_sup_r optimal_force=150
  CoordinateActuator arm_flex_l_reserve: coordinate=arm_flex_l optimal_force=150
  CoordinateActuator arm_add_l_reserve: coordinate=arm_add_l optimal_force=150
  CoordinateActuator arm_rot_l_reserve: coordinate=arm_rot_l optimal_force=150
  CoordinateActuator elbow_flex_l_reserve: coordinate=elbow_flex_l optimal_force=150
  CoordinateActuator pro_sup_l_reserve: coordinate=pro_sup_l optimal_force=150
