# OpenSim document version 30000
ScaleTool staticP032_SCALED:
  mass: 72
  GenericModelMaker:
    model_file: ../skeletal_models/fullbody7.osim
    marker_set_file: staticP032_markerSet.xml
  ModelScaler:
    apply: true
    scaling_order: measurements manualScale
    marker_file: ../experimental_data/staticP032.trc
    time_range: 0.01 1
    preserve_mass_distribution: true
    output_scale_file: staticP032_ScaleSet_Applied.xml
    MeasurementSet: file=staticP032_measurementSet.xml
  MarkerPlacer:
    apply: true
    optimizer_algorithm: ipopt
    marker_file: ../experimental_data/staticP032.trc
    time_range: 0.5 1
    output_model_file: ../skeletal_models/staticP032_fullbody7_SCALED.osim
    output_motion_file: staticP032_static_output.mot
    IKTaskSet: file=staticP032_taskSet.xml
