# OpenSim document version 30000
ScaleTool staticP04_SCALED:
  mass: 81.9
  height: 2
  age: 99
  GenericModelMaker:
    model_file: ../OsimModels/fullbody7.osim
    marker_set_file: staticP04_markerSet.xml
  ModelScaler:
    apply: true
    scaling_order: measurements manualScale
    marker_file: ../ExpData/staticP04.trc
    time_range: 0.01 1
    preserve_mass_distribution: true
    output_scale_file: staticP04_ScaleSet_Applied.xml
    MeasurementSet: file=staticP04_measurementSet.xml
  MarkerPlacer:
    apply: true
    optimizer_algorithm: ipopt
    marker_file: ../ExpData/staticP04.trc
    time_range: 0.5 1
    output_model_file: ../OsimModels/staticP04_fullbody7_SCALED.osim
    output_motion_file: staticP04_static_output.mot
    IKTaskSet: file=staticP04_taskSet.xml
