# OpenSim document version 30000
ScaleTool staticP051_SCALED:
  mass: 76.3
  height: 2
  age: 99
  GenericModelMaker:
    model_file: ../OsimModels/fullbody7.osim
    marker_set_file: staticP051_markerSet.xml
  ModelScaler:
    apply: true
    scaling_order: measurements manualScale
    marker_file: ../ExpData/staticP051.trc
    time_range: 0.01 1
    preserve_mass_distribution: true
    output_scale_file: staticP051_ScaleSet_Applied.xml
    MeasurementSet: file=staticP051_measurementSet.xml
  MarkerPlacer:
    apply: true
    optimizer_algorithm: ipopt
    marker_file: ../ExpData/staticP051.trc
    time_range: 0.5 1
    output_model_file: ../OsimModels/staticP051_fullbody7_SCALED.osim
    output_motion_file: staticP051_static_output.mot
    IKTaskSet: file=staticP051_taskSet.xml
