# OpenSim document version 30000
ScaleTool staticP072_SCALED:
  mass: 72
  GenericModelMaker:
    model_file: ../skeletal_models/fullbody7.osim
    marker_set_file: staticP072_markerSet.xml
  ModelScaler:
    apply: true
    scaling_order: measurements manualScale
    marker_file: ../experimental_data/staticP072.trc
    time_range: 0.01 1
    preserve_mass_distribution: true
    output_scale_file: staticP072_ScaleSet_Applied.xml
    MeasurementSet: file=staticP072_measurementSet.xml
  MarkerPlacer:
    apply: true
    optimizer_algorithm: ipopt
    marker_file: ../experimental_data/staticP072.trc
    time_range: 0.5 1
    output_model_file: ../skeletal_models/staticP072_fullbody7_SCALED.osim
    output_motion_file: staticP072_static_output.mot
    IKTaskSet: file=staticP072_taskSet.xml
