# OpenSim document version 30000
ScaleTool staticP07_SCALED:
  mass: 67.8
  height: 2
  age: 99
  GenericModelMaker:
    model_file: ../OsimModels/fullbody7.osim
    marker_set_file: staticP07_markerSet.xml
  ModelScaler:
    apply: true
    scaling_order: measurements manualScale
    marker_file: ../ExpData/staticP07.trc
    time_range: 0.01 1
    preserve_mass_distribution: true
    output_scale_file: staticP07_ScaleSet_Applied.xml
    MeasurementSet: file=staticP07_measurementSet.xml
  MarkerPlacer:
    apply: true
    optimizer_algorithm: ipopt
    marker_file: ../ExpData/staticP07.trc
    time_range: 0.5 1
    output_model_file: ../OsimModels/staticP07_fullbody7_SCALED.osim
    output_motion_file: staticP07_static_output.mot
    IKTaskSet: file=staticP07_taskSet.xml
