# OpenSim document version 30000
ScaleTool staticP082_SCALED:
  mass: 72
  GenericModelMaker:
    model_file: ../skeletal_models/fullbody7.osim
    marker_set_file: staticP082_markerSet.xml
  ModelScaler:
    apply: true
    scaling_order: measurements manualScale
    marker_file: ../experimental_data/staticP082.trc
    time_range: 0.01 1
    preserve_mass_distribution: true
    output_scale_file: staticP082_ScaleSet_Applied.xml
    MeasurementSet: file=staticP082_measurementSet.xml
  MarkerPlacer:
    apply: true
    optimizer_algorithm: ipopt
    marker_file: ../experimental_data/staticP082.trc
    time_range: 0.5 1
    output_model_file: ../skeletal_models/staticP082_fullbody7_SCALED.osim
    output_motion_file: staticP082_static_output.mot
    IKTaskSet: file=staticP082_taskSet.xml
