# OpenSim document version 30000
ScaleTool staticP08_SCALED:
  mass: 74.9
  height: 2
  age: 99
  GenericModelMaker:
    model_file: ../OsimModels/fullbody7.osim
    marker_set_file: staticP08_markerSet.xml
  ModelScaler:
    apply: true
    scaling_order: measurements manualScale
    marker_file: ../ExpData/staticP08.trc
    time_range: 0.01 1
    preserve_mass_distribution: true
    output_scale_file: staticP08_ScaleSet_Applied.xml
    MeasurementSet: file=staticP08_measurementSet.xml
  MarkerPlacer:
    apply: true
    optimizer_algorithm: ipopt
    marker_file: ../ExpData/staticP08.trc
    time_range: 0.5 1
    output_model_file: ../OsimModels/staticP08_fullbody7_SCALED.osim
    output_motion_file: staticP08_static_output.mot
    IKTaskSet: file=staticP08_taskSet.xml
