# OpenSim document version 30000
ScaleTool staticP09_SCALED:
  mass: 59.7
  height: 2
  age: 99
  GenericModelMaker:
    model_file: ../OsimModels/fullbody7.osim
    marker_set_file: staticP09_markerSet.xml
  ModelScaler:
    apply: true
    scaling_order: measurements manualScale
    marker_file: ../ExpData/staticP09.trc
    time_range: 0.01 1
    preserve_mass_distribution: true
    output_scale_file: staticP09_ScaleSet_Applied.xml
    MeasurementSet: file=staticP09_measurementSet.xml
  MarkerPlacer:
    apply: true
    optimizer_algorithm: ipopt
    marker_file: ../ExpData/staticP09.trc
    time_range: 0.5 1
    output_model_file: ../OsimModels/staticP09_fullbody7_SCALED.osim
    output_motion_file: staticP09_static_output.mot
    IKTaskSet: file=staticP09_taskSet.xml
