# OpenSim document version 30000
ScaleTool staticP112_SCALED:
  mass: 72
  GenericModelMaker:
    model_file: ../skeletal_models/fullbody7.osim
    marker_set_file: staticP112_markerSet.xml
  ModelScaler:
    apply: true
    scaling_order: measurements manualScale
    marker_file: ../experimental_data/staticP112.trc
    time_range: 0.01 1
    preserve_mass_distribution: true
    output_scale_file: staticP112_ScaleSet_Applied.xml
    MeasurementSet: file=staticP112_measurementSet.xml
  MarkerPlacer:
    apply: true
    optimizer_algorithm: ipopt
    marker_file: ../experimental_data/staticP112.trc
    time_range: 0.5 1
    output_model_file: ../skeletal_models/staticP112_fullbody7_SCALED.osim
    output_motion_file: staticP112_static_output.mot
    IKTaskSet: file=staticP112_taskSet.xml
