# OpenSim document version 30000
ScaleTool staticP11_SCALED:
  mass: 84.7
  GenericModelMaker:
    model_file: ../skeletal_models/fullbody7.osim
    marker_set_file: staticP11_markerSet.xml
  ModelScaler:
    apply: true
    scaling_order: measurements manualScale
    marker_file: ../experimental_data/staticP11.trc
    time_range: 0.01 1
    preserve_mass_distribution: true
    output_scale_file: staticP11_ScaleSet_Applied.xml
    MeasurementSet: file=staticP11_measurementSet.xml
  MarkerPlacer:
    apply: true
    optimizer_algorithm: ipopt
    marker_file: ../experimental_data/staticP11.trc
    time_range: 0.5 1
    output_model_file: ../skeletal_models/staticP11_fullbody7_SCALED.osim
    output_motion_file: staticP11_static_output.mot
    IKTaskSet: file=staticP11_taskSet.xml
