# OpenSim document version 30000
ScaleTool staticP12_SCALED:
  mass: 0
  height: -1
  age: -1
  GenericModelMaker:
    model_file: ../skeletal_models/staticP12_fullbody7_SCALED.osim
  ModelScaler:
    apply: true
    time_range: .1 .2
    preserve_mass_distribution: false
  MarkerPlacer:
    apply: true
    marker_file: ../experimental_data/staticP12.trc
    time_range: 0.5 1
    output_model_file: ../skeletal_models/staticP12_fullbody7_SCALED.osim
    output_motion_file: staticP12_static_output.mot
    IKTaskSet: file=staticP12_taskSet.xml
